// SBML level 2 version 4

model Raf_Mitra_NatCom2018OptimalScaling_3CatQual()
  // A model of Raf inhibition, used as an example problem in Mitra et al. "Using both qualitative and quantitative data to improve parameter identification for systems biology models"

  // Compartments:
  compartment compartment = 1;

  // Species:
  species R in compartment = 50;
  species I in compartment = init_I;
  species RI in compartment = 0;
  species R_R in compartment = 0;
  species RIR in compartment = 0;
  species RIRI in compartment = 0;

  // Parameters:
  K1 = 0.04 unit_0;
  K2 = 20 unit_0;
  K3 = 4000 unit_0;
  K5 = 0.1 unit_0;
  K4 has unit_0;
  K6 has unit_0;
  Rtot has unit_1;
  Itot has unit_1;
  init_I = 30;
  sigma_Ybar = 0;
  sigma_Activity = 0;
  observableParameter1_Activity = 1;
  observableParameter2_Activity = 1;
  observableParameter3_Activity = 1;

  // Assignment rules:
  Rtot := R + RI + 2*(R_R + RIR + RIRI);
  Itot := I + RI + RIR + 2*RIRI;
  K4 := K1*K3/K2;
  K6 := K4*K5/K2;

  // Reactions:
  Dimerize: 2 R -> R_R; compartment*(K1*R^2 - Dimerize_k2*R_R);
    Dimerize_k2 = 1;
  Dimerize_RI: 2 RI -> RIRI; compartment*(K6*RI^2 - Dimerize_RI_k2*RIRI);
    Dimerize_RI_k2 = 1;
  Inhibit: R + I -> RI; compartment*(K2*R*I - Inhibit_k2*RI);
    Inhibit_k2 = 1;
  Inhibit_RR: R_R + I -> RIR; compartment*(K3*R_R*I - Inhibit_RR_k2*RIR);
    Inhibit_RR_k2 = 1;
  Inhibit_RIR: RIR + I -> RIRI; compartment*(K5*RIR*I - Inhibit_RIR_k2*RIRI);
    Inhibit_RIR_k2 = 1;
  Dimerize_R_RI: R + RI -> RIR; compartment*(K4*R*RI - Dimerize_R_RI_k2*RIR);
    Dimerize_R_RI_k2 = 1;

  // Unit definitions:
  unit substance = 1e-6 mole;
  unit unit_0 = (1e-6 dimensionless)^0 * litre / mole; unit_0 is "l/umol";
  unit unit_1 = (1e-6 dimensionless)^0 * mole / litre; unit_1 is "umol/l";
end
